*Heading
** Job name: Job-3 Model name: Model-1
*Preprint, echo=NO, model=NO, history=NO, contact=NO
**
** PARTS
**
*Part, name=Steel
*End Part
**
**
** ASSEMBLY
**
*Assembly, name=Assembly
**
*Instance, name=Steel-1, part=Steel
       0.002,           0.,      -0.0025
*Node
      1, -0.00400000019,  0.100000001, 0.00499999989
      2, -0.00400000019,           0., 0.00499999989
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*Element, type=DC3D8
  1,  194,  763, 3697,  745,    1,   21,  511,  104
  2,  763,  764, 3698, 3697,   21,   22,  512,  511
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*Nset, nset=Set-2, generate
    1,  7440,     1
*Elset, elset=Set-2, generate
    1,  5624,     1
** Section: Section-1
*Solid Section, elset=Set-2, material=Steel
,
*End Instance
**
*Elset, elset=Element, instance=Steel-1, generate
   1,  640,    1
*Nset, nset=Set-3, instance=Steel-1
    3,    6,    9,   10,   11,   12
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*Elset, elset=Set-3, instance=Steel-1
  160,  320,  480,  640,  693,  694
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*Nset, nset=Set-6, instance=Steel-1
    1,    2,    3,    4,    5,    6
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*Elset, elset=Set-6, instance=Steel-1, generate
   1,  640,    1
*Nset, nset=Set-7, instance=Steel-1
    1,    2,    3,    4,    5,    6
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*Elset, elset=Set-7, instance=Steel-1, generate
   1,  640,    1
*Nset, nset=Set-10, instance=Steel-1
    1,    2,    3,    4,    5,    6
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*Elset, elset=Set-10, instance=Steel-1, generate
   1,  640,    1
*Nset, nset=Set-12, instance=Steel-1, generate
    1,  7440,     1
*Elset, elset=Set-12, instance=Steel-1, generate
    1,  5624,     1
*Elset, elset=_Surf-1_S5, internal, instance=Steel-1
  693,  694,  695,  696,  749,  750
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*Surface, type=ELEMENT, name=Surf-1
_Surf-1_S5, S5
*Elset, elset=_Surf-6_S1, internal, instance=Steel-1
  481,  482,  483,  484,  485,  486
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*Elset, elset=_Surf-6_S6, internal, instance=Steel-1
    1,   41,   81,  121,  161,  201
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*Elset, elset=_Surf-6_S2, internal, instance=Steel-1
    1,    2,    3,    4,    5,    6
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*Elset, elset=_Surf-6_S5, internal, instance=Steel-1
  693,  694,  695,  696,  749,  750
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*Elset, elset=_Surf-6_S4, internal, instance=Steel-1
   40,   80,  120,  160,  200,  240
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*Elset, elset=_Surf-6_S3, internal, instance=Steel-1
 2881, 2882, 2883, 2884, 2885, 2886
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*Surface, type=ELEMENT, name=Surf-6
_Surf-6_S1, S1
_Surf-6_S6, S6
_Surf-6_S2, S2
_Surf-6_S4, S4
_Surf-6_S5, S5
_Surf-6_S3, S3
*Elset, elset=_Surf-7_S1, internal, instance=Steel-1
  481,  482,  483,  484,  485,  486
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*Elset, elset=_Surf-7_S6, internal, instance=Steel-1
    1,   41,   81,  121,  161,  201
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*Elset, elset=_Surf-7_S2, internal, instance=Steel-1
    1,    2,    3,    4,    5,    6
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*Elset, elset=_Surf-7_S5, internal, instance=Steel-1
  693,  694,  695,  696,  749,  750
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*Elset, elset=_Surf-7_S4, internal, instance=Steel-1
   40,   80,  120,  160,  200,  240
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*Elset, elset=_Surf-7_S3, internal, instance=Steel-1
 2881, 2882, 2883, 2884, 2885, 2886
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*Surface, type=ELEMENT, name=Surf-7
_Surf-7_S1, S1
_Surf-7_S6, S6
_Surf-7_S2, S2
_Surf-7_S4, S4
_Surf-7_S5, S5
_Surf-7_S3, S3
*End Assembly
**
** MATERIALS
**
*Material, name=Steel
*Conductivity
 25.956, 19.135
 25.956, 51.135
 27.022, 99.099

*Density
7800.,
*Elastic
 2.16e+11, 0.29956,  21.279

*Expansion
 1.04e-05, 17.653

*Latent Heat
260000.,0.,0.
*Plastic
    4.87e+08,       0.,   20.377
    4.92e+08,  0.00128,   20.377
    4.97e+08,  0.00257,   20.377
    5.02e+08,  0.00385,   20.377
    5.07e+08,  0.00514,   20.377
    5.12e+08,  0.00642,   20.377
    5.17e+08,   0.0077,   20.377
    5.22e+08,  0.00899,   20.377
    5.27e+08,   0.0103,   20.377
    5.32e+08,   0.0116,   20.377
    5.37e+08,   0.0128,   20.377
    5.42e+08,   0.0141,   20.377
    5.47e+08,   0.0154,   20.377
    5.52e+08,   0.0167,   20.377
    5.57e+08,    0.018,   20.377
    5.62e+08,   0.0193,   20.377
    5.67e+08,   0.0205,   20.377
    5.72e+08,   0.0218,   20.377
    5.77e+08,   0.0231,   20.377
    5.82e+08,   0.0244,   20.377
    5.85e+08,   0.0252,   20.377
*Specific Heat
 417.78, 21.861
 462.22, 49.846
**
** PHYSICAL CONSTANTS
**
*Physical Constants, absolute zero=0, stefan boltzmann=0
**
** PREDEFINED FIELDS
**
** Name: Predefined Field-1   Type: Temperature
*Initial Conditions, type=TEMPERATURE
Set-12, 25.
** ----------------------------------------------------------------
**
** STEP: Step-1
**
*Step, name=Step-1, nlgeom=NO, inc=10000
*Heat Transfer, end=PERIOD, deltmx=50.
1e-05, 1e-05, 1e-10, 1e-05,
**
** INTERACTIONS
**
** Interaction: Int-1
*Model Change, remove
Element,
**
** OUTPUT REQUESTS
**
*Restart, write, frequency=0
**
** FIELD OUTPUT: F-Output-1
**
*Output, field
*Node Output
NT,
*Element Output, directions=YES
HFL, TEMP
**
** HISTORY OUTPUT: H-Output-1
**
*Output, history
*Element Output, elset=Element
TEMP,
*End Step
** ----------------------------------------------------------------
**
** STEP: Step-2
**
*Step, name=Step-2, nlgeom=NO, inc=10000
*Heat Transfer, end=PERIOD, deltmx=50.
1e-05, 1e-05, 1e-10, 1e-05,
**
** INTERACTIONS
**
** Interaction: Int-2
*Model Change, add
Element,
**
** OUTPUT REQUESTS
**
*Restart, write, frequency=0
**
** FIELD OUTPUT: F-Output-2
**
*Output, field
*Node Output
NT, RFL
*Element Output, directions=YES
HFL, TEMP
*Radiation Output
FTEMP,
**
** HISTORY OUTPUT: H-Output-1
**
*Output, history
*Element Output, elset=Element
TEMP,
*End Step
** ----------------------------------------------------------------
**
** STEP: Step-3
**
*Step, name=Step-3, nlgeom=NO, inc=100000
*Heat Transfer, end=PERIOD, deltmx=50.
0.1, 20., 0.0002, 20.,
**
** LOADS
**
** Name: Load-1   Type: Body heat flux
*Dflux
Set-10, BFNU, 2.
**
** OUTPUT REQUESTS
**
*Restart, write, frequency=0
**
** FIELD OUTPUT: F-Output-3
**
*Output, field
*Node Output
NT, RFL
*Element Output, directions=YES
HFL, TEMP
**
** HISTORY OUTPUT: H-Output-1
**
*Output, history
*Element Output, elset=Element
TEMP,
*End Step
** ----------------------------------------------------------------
**
** STEP: Step-4
**
*Step, name=Step-4, nlgeom=NO, inc=100000
*Heat Transfer, end=PERIOD, deltmx=50.
0.1, 400., 0.004, 400.,
**
** INTERACTIONS
**
** Interaction: Int-3
*Sfilm
Surf-6, F, 25., 5.
** Interaction: Int-4
*Sradiate
Surf-7, R, 25., 0.78
**
** OUTPUT REQUESTS
**
*Restart, write, frequency=0
**
** FIELD OUTPUT: F-Output-4
**
*Output, field
*Node Output
NT, RFL
*Element Output, directions=YES
HFL, TEMP
**
** HISTORY OUTPUT: H-Output-1
**
*Output, history
*Element Output, elset=Element
TEMP,
*End Step
